//This file creates the environment around the human
#define HumanModelPresent 1

AnyFixedRefFrame GlobalRef =
{
  Origin={0,0,0};
  AnyDrawRefFrame drw={ScaleXYZ=0.4*{1,1,1};};
};

#undef HumanModelPresent
